# OpenSim document version 40000
MarkerSet:
  Marker C7: torso (-0.08 0.42 0.003) fixed=true
  Marker r_shoulder: torso (0 0.418 0.142) fixed=true
  Marker l_shoulder: torso (0 0.418 -0.142) fixed=true
  Marker sternum: torso (0.046 0.385 -0.025) fixed=true
  Marker r_ASIS: pelvis (0.028 0.01 0.128) fixed=true
  Marker l_ASIS: pelvis (0.028 0.01 -0.128) fixed=true
  Marker r_PSIS: pelvis (-0.154 0.025 0.05) fixed=true
  Marker l_PSIS: pelvis (-0.154 0.025 -0.05) fixed=true
  Marker r_HJC: femur_r (0 0 0)
  Marker l_HJC: femur_l (0 0 0)
  Marker r_thigh1: femur_r (0.08 -0.324 0.0047)
  Marker r_thigh2: femur_r (0.08 -0.324 0.0047)
  Marker r_thigh3: femur_r (0.08 -0.324 0.0047)
  Marker r_thigh4: femur_r (0.08 -0.324 0.0047)
  Marker r_thigh5: femur_r (0.08 -0.324 0.0047)
  Marker r_knee: femur_r (0.008 -0.404 0.055) fixed=true
  Marker r_mknee: femur_r (0.011 -0.401 -0.055) fixed=true
  Marker r_shank_antsup: tibia_r (0.0104 -0.2322 0.0748)
  Marker r_sh2: tibia_r (0.0104 -0.2322 0.0748)
  Marker r_sh3: tibia_r (0.0104 -0.2322 0.0748)
  Marker r_sh4: tibia_r (0.0104 -0.2322 0.0748)
  Marker r_ankle: tibia_r (-0.01743173 -0.3850714 0.04727037) fixed=true
  Marker r_mankle: tibia_r (0.006 -0.38 -0.038) fixed=true
  Marker r_toe: calcn_r (0.1804591 0.01762133 0.001004512) fixed=true
  Marker r_5meta: calcn_r (0.1358638 0.001114828 0.06143212) fixed=true
  Marker r_calc: calcn_r (-0.0321615 0.01491079 -0.0111695) fixed=true
  Marker l_thigh1: femur_l (0.08 -0.324 -0.0047)
  Marker l_thigh2: femur_l (0.08 -0.324 -0.0047)
  Marker l_thigh3: femur_l (0.08 -0.324 -0.0047)
  Marker l_thigh4: femur_l (0.08 -0.324 -0.0047)
  Marker l_knee: femur_l (0.008 -0.404 -0.055) fixed=true
  Marker l_mknee: femur_l (0.011 -0.401 0.055) fixed=true
  Marker l_ankle: tibia_l (-0.017 -0.385 -0.047) fixed=true
  Marker l_shank_antsup: tibia_l (0.0125 -0.3196 -0.06)
  Marker l_sh2: tibia_l (0.0125 -0.3196 -0.06)
  Marker l_sh3: tibia_l (0.0125 -0.3196 -0.06)
  Marker l_mankle: tibia_l (0.006 -0.38 0.038) fixed=true
  Marker l_toe: calcn_l (0.1804591 0.01762133 -0.001004512) fixed=true
  Marker l_calc: calcn_l (-0.03 0.01459576 0.01) fixed=true
  Marker l_5meta: calcn_l (0.1358638 0.001114828 -0.06143212) fixed=true
  Marker r_melbow: humerus_r (0.005511308 -0.2781543 -0.04596903) fixed=true
  Marker r_elbow: humerus_r (0.01046536 -0.2731899 0.04165469) fixed=true
  Marker r_wrist_radius: radius_r (-0.02965623 -0.2244783 0.03462701) fixed=true
  Marker r_wrist_ulna: radius_r (-0.02980336 -0.2253365 -0.01089353) fixed=true
  Marker l_melbow: humerus_l (0.005511308 -0.2781543 0.04596903) fixed=true
  Marker l_elbow: humerus_l (0.01046536 -0.2731899 -0.04165469) fixed=true
  Marker l_wrist_radius: radius_l (-0.0354783 -0.2265841 -0.03585613) fixed=true
  Marker l_wrist_ulna: radius_l (-0.04018316 -0.2267243 0.005623399) fixed=true
